*Heading
Shear test - 1 CPS4 element - 1616 integration points (adaptive)
** Shear test.
** GEOMETRY: W=20 mm, H=20 mm, t=20 mm.
** ELEMENTS: 4-nodes, 2D plane stress.
** MATERIAL MODEL: DFD (INCOMPRESSIBLE formulation), 1616 integration points read from external file (TrighMesh adaptive interation).
** MATERIAL PARAMETERS: Parameters from Alberini et al. (2024) (Acta Biomater.) (fiber parameters averaged from 1st fiber family).
** STRETCH: shear12=0.4, global direction G1.
*Preprint, echo=NO, model=YES, history=NO, contact=NO
**
** =============================================================================
** ================================= PARAMETERS ================================
** =============================================================================
*parameter
** -----------------------------------------------------------------------------
** MATERIAL PARAMETERS FOR THE UMAT SUBROUTINE UMAT_DFD_LEB.FOR
** -----------------------------------------------------------------------------
** ncf         : number of fibers families.
** vg          : volume fraction of matrix, nu_g.
** mu [Pa]     : matrix shear modulus, mu.
** bulk [Pa]   : bulk modulus, K (ignored in incompressible formulation).
** k1 [Pa]     : fiber parameter, k1>=0.
** k2          : fiber parameter, k2>=0.
** vfi         : volume fraction of the i-th family of fibers, nu_f.
** alphai [deg]: in-plane angle of the fibre family mean direction (wrt x dir).
** betai [deg] : out-of-plane angle of the fibre family mean direction (wrt x-y plane).
** gammai [deg]: rolling angle of fibre family about its mean direction.
** conai       : in-plane von Mises concentration parameter [-inf,inf].
** conbi       : out-of-plane von Mises concentration parameter [-inf,inf].
**
matname = "DFD_IN-human_skin-1616"
**
ncf    = 1
**
vg     = 1.00
mu     = 1.142e3
bulk   = mu*1e2
**
k1     = 1.9074e3
k2     = 43.59
**
vf1    = 1.00
alpha1 = 135.00
beta1  = 0.00
gamma1 = 0.00
cona1  = 2.060
conb1  = 12.363
**
** -----------------------------------------------------------------------------
** COMPUTATION PARAMETERS
** -----------------------------------------------------------------------------
** rint: integration points source flag (999=read integration points of i-th
**       fiber family from materialname.int[i] file, ignore concentrations
**       parameters conai, conbi; 0=use built-in Lebedev integration).
** nint: target number of Lebedev integration points on the unit sphere per fiber family (ignored if rint=999).
** thr : threshold integrand value for integration points retention (1e-6 suggested, 0.0 keeps all).
** csw : compressed fiber exclusion switch (1=exclude comp fibers, 0=include all fibers).
** elem: element type (1=continuum, 2=structural).
** ori : type of active orientation (0=global orientation, 1=local orientation).
**
rint = 999
nint = 0
thr  = 1e-6
csw  = 1
**
** IMPORTANT VARIABLES FOR THE CORRECT COMPUTATION OF THE DEFORMATION GRADIENT
elem = 1
ori  = 1
**
** -----------------------------------------------------------------------------
** GEOMETRICAL PARAMETERS
** -----------------------------------------------------------------------------
** a: width[m] b: height[m] t: thickness[m]
a = 0.02
b = 0.02
t = 0.02
**
** -----------------------------------------------------------------------------
** ELEMENT TYPE
** -----------------------------------------------------------------------------
eltype  = "CPS4"
**
** -----------------------------------------------------------------------------
** LOADING PARAMETERS
** -----------------------------------------------------------------------------
shear12  = 0.4
strain1  = abs(shear12)
length   = b
disp1    = length*shear12
**
** -----------------------------------------------------------------------------
** STEP PARAMETERS
** -----------------------------------------------------------------------------
** Time parametrs:
dstrain  = 0.01
ninc     = strain1/dstrain
incini   = 1.0/ninc
incmax   = 1.0/ninc
**
** -----------------------------------------------------------------------------
** LOCAL ORIENTATION PARAMETERS
** -----------------------------------------------------------------------------
Pi = 3.141592654
**
** theta3 [deg]: local basis Ei rotation angle along the z axis.
theta3 = 30.0
**
** Local direction.
c1 = cos(alpha1*Pi/180)
s1 = sin(alpha1*Pi/180)
**
** =============================================================================
** ==================================== MODEL ==================================
** =============================================================================
** -----------------------------------------------------------------------------
** PARTS
** -----------------------------------------------------------------------------
*Part, name=sheet
*Node
	  1,           0.,           0.,           0.
      2,          <a>,           0.,           0.
	  3,          <a>,          <b>,           0.
      4,           0.,          <b>,           0.
*Element, type=<eltype>
1, 1, 2, 3, 4
*Nset, nset=Set-1, generate
 1,  4,  1
*Elset, elset=Set-1
 1,
*Orientation, name=LocOri, system=RECTANGULAR, local directions=2
1., 0., 0., 0., 1., 0.
3, <theta3>
<c1>,<s1>, 0.
 0., 0., 1.
** Section
*Solid Section, elset=Set-1, material=<matname>, orientation=LocOri
<t>,
*End Part
** -----------------------------------------------------------------------------
** ASSEMBLY
** -----------------------------------------------------------------------------
*Assembly, name=Assembly
**
*Instance, name=sheet-1, part=sheet
*End Instance
**
*Nset, nset=XNEG, instance=sheet-1
 1, 4
*Nset, nset=YNEG, instance=sheet-1
 1, 2
*Nset, nset=XPOS, instance=sheet-1
 2, 3
*Nset, nset=YPOS, instance=sheet-1
 3, 4
*Elset, elset=Set-1, instance=sheet-1
 1,
*End Assembly
** -----------------------------------------------------------------------------
** AMPLITUDE
** -----------------------------------------------------------------------------
*Amplitude, name=SMOOTHAPPLY, definition=SMOOTH STEP
0., 0., 1., 1.
*Amplitude, name=SMOOTHRELEASE, definition=SMOOTH STEP
0., 1., 1., 0.
** -----------------------------------------------------------------------------
** MATERIALS
** -----------------------------------------------------------------------------
*Material, name=DFD_IN-human_skin-1616
*Depvar
<ncf>
*User Material, constants=20
<bulk>, <vg>, <mu>, <k1>, <k2>, <vf1>, <alpha1>, <beta1>,
<gamma1>, <cona1>, <conb1>, <rint>, <nint>, <thr>, <csw>, <elem>,
<ori>, 0.0, 0.0, <theta3>
**
** =============================================================================
** ==================================== STEPS ==================================
** =============================================================================
** -----------------------------------------------------------------------------
** STEP 1
** -----------------------------------------------------------------------------
*Step, name=Step-1, nlgeom=YES, inc=10000, unsymm=YES
*Static
<incini>, 1., 1e-05, <incmax>
**
** BOUNDARY CONDITIONS
**
** *Boundary, amplitude=SMOOTHAPPLY
*Boundary
**Fix surfaces +Y, -Y
YNEG, 1, 1
YNEG, 2, 2
YPOS, 2, 2
**Move surface +Y in x direction
YPOS, 1, 1, <disp1>
**
** OUTPUT REQUESTS
**
*Restart, write, frequency=0
**
** FIELD OUTPUT: F-Output-1
**
*Output, field
*Node Output
U, RF
*Element Output, directions=YES
E, LE, NE, S, SDV
**
** HISTORY OUTPUT: H-Output-1
**
*Output, history, variable=PRESELECT
*End Step
**
** =============================================================================
