*Heading
Annular disk torsion test - 1202 integration points (Lebedev)
** GEOMETRY: Annular disk, outer radius D=10 mm, inner radius d=4 mm, (see Ehret et al., 2010).
** ELEMENTS: 4-nodes, 3D membrane elements (structural).
** MATERIAL MODEL: DFD model (INCOMPRESSIBLE formulation), 1202 Lebedev integration points.
** MATERIAL PARAMETERS: Parameters from Alberini et al. (2024) (Acta Biomater.) (planar isotropic fiber distribution).
** LOADS: Fix outer boundary, left torsion (theta=30°) on the inner boundary.
*Preprint, echo=NO, model=NO, history=NO, contact=NO
**
** =============================================================================
** ================================ PARAMETERS =================================
** =============================================================================
*Parameter
** -----------------------------------------------------------------------------
** MATERIAL PARAMETERS FOR THE UMAT SUBROUTINE UMAT_DFD_LEB.FOR
** -----------------------------------------------------------------------------
** ncf         : number of fibers families.
** vg          : volume fraction of matrix, nu_g.
** mu [Pa]     : matrix shear modulus, mu.
** bulk [Pa]   : bulk modulus, K (ignored in incompressible formulation).
** k1 [Pa]     : fiber parameter, k1>=0.
** k2          : fiber parameter, k2>=0.
** vfi         : volume fraction of the i-th family of fibers, nu_f.
** alphai [deg]: in-plane angle of the fibre family mean direction (wrt x dir).
** betai [deg] : out-of-plane angle of the fibre family mean direction (wrt x-y plane).
** gammai [deg]: rolling angle of fibre family about its mean direction.
** conai       : in-plane von Mises concentration parameter [-inf,inf].
** conbi       : out-of-plane von Mises concentration parameter [-inf,inf].
**
matname = "DFD_IN-human_skin"
**
ncf    = 1
**
vg     = 1.00
mu     = 1.142e3
bulk   = mu*1e2
**
k1     = 1.9074e3
k2     = 43.59
**
vf1    = 1.00
alpha1 = 0.00
beta1  = 0.00
gamma1 = 0.00
cona1  = 0.00
conb1  = 12.363
**
** -----------------------------------------------------------------------------
** COMPUTATION PARAMETERS
** -----------------------------------------------------------------------------
** rint: integration points source flag (999=read integration points of i-th
**       fiber family from materialname.int[i] file, ignore concentrations
**       parameters conai, conbi; 0=use built-in Lebedev integration).
** nint: target number of Lebedev integration points on the unit sphere per fiber family (ignored if rint=999).
** thr : threshold integrand value for integration points retention (1e-6 suggested, 0.0 keeps all).
** csw : compressed fiber exclusion switch (1=exclude comp fibers, 0=include all fibers).
** elem: element type (1=continuum, 2=structural).
** ori : type of active orientation (0=global orientation, 1=local orientation).
**
rint = 0
nint = 1202
thr  = 1e-6
csw  = 1
**
** IMPORTANT VARIABLES FOR THE CORRECT COMPUTATION OF THE DEFORMATION GRADIENT
elem = 2
ori  = 0
**
** -----------------------------------------------------------------------------
** GEOMETRICAL PARAMETERS
** -----------------------------------------------------------------------------
** t[m]: thickness
t = 2.92e-03
**
** -----------------------------------------------------------------------------
** ELEMENT TYPE
** -----------------------------------------------------------------------------
eltype  = "M3D4"
**
** -----------------------------------------------------------------------------
** STEP PARAMETERS
** -----------------------------------------------------------------------------
** Time parametrs:
incini    = 0.001
steptime1 = 1.00
incmin    = 0.00001
incmax    = 0.10
**
** Tolerances:
** Rn: tolerance for largest residual in the balance equation (Abaqus default 5E-3).
** cn: tolerance for largest maximum correction to nodal variable (Abaqus default 1E-2).
Rn1 = 5E-3
cn1 = 1E-2
**
** -----------------------------------------------------------------------------
** LOADING PARAMETERS
** -----------------------------------------------------------------------------
** Control point displacement/rotation.
Pi  = 3.141592654
theta = 30*Pi/180
**
** =============================================================================
** =================================== MODEL ===================================
** =============================================================================
** -----------------------------------------------------------------------------
** PARTS
** -----------------------------------------------------------------------------
*Part, name=annular_disk
*Node
      1,           0., 0.00400000019,           0.
      2,           0., 0.00999999978,           0.
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*Element, type=<eltype>
   1,    1,    9,  913,  282
   2,    9,   10,  914,  913
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*Nset, nset=boundary_ext
   2,   3,   6,   7,  57,  58
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*Elset, elset=boundary_ext
    49,    98,   147,   196,   245,   294
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*Nset, nset=boundary_int
   1,   4,   5,   8, 194, 195
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*Elset, elset=boundary_int
     1,    50,    99,   148,   197,   246
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*Nset, nset=all_nodes, generate
    1, 18000,     1
*Elset, elset=all_elements, generate
    1, 17640,     1
**
** Section:skin
*Membrane Section, elset=all_elements, material=<matname>
<t>,
*End Part
**
*Part, name=control_point
*Node
      1,    0.0000000,    0.0000000,    0.0000000
*Nset, nset=control_point, internal
    1,
*End Part
**
** -----------------------------------------------------------------------------
** ASSEMBLY
** -----------------------------------------------------------------------------
*Assembly, name=Assembly
**
*Instance, name=annular_disk-1, part=annular_disk
*End Instance
**
*Instance, name=control_point_instance, part=control_point
*End Instance
**
*Nset, nset=mpc_control_point, instance=control_point_instance
    1,
**
** Constraint: axial_rotation
*MPC, user, mode=NODE
123, annular_disk-1.boundary_int, mpc_control_point
**
*End Assembly
**
** -----------------------------------------------------------------------------
** AMPLITUDE
** -----------------------------------------------------------------------------
*Amplitude, name=SMOOTHAPPLY, definition=SMOOTH STEP
0., 0., 1., 1.
**
** -----------------------------------------------------------------------------
** MATERIALS
** -----------------------------------------------------------------------------
*Material, name=DFD_IN-human_skin
*Depvar
<ncf>
*User Material, constants=20
<bulk>, <vg>, <mu>, <k1>, <k2>, <vf1>, <alpha1>, <beta1>,
<gamma1>, <cona1>, <conb1>, <rint>, <nint>, <thr>, <csw>, <elem>,
<ori>, 0.0, 0.0, 0.0
**
** =============================================================================
** =================================== STEPS ===================================
** =============================================================================
** -----------------------------------------------------------------------------
** INITIAL CONDITIONS
** -----------------------------------------------------------------------------
** .........................
** BOUNDARY CONDITIONS
** .........................
** Name: BC-ext Type: Displacement/Rotation
*Boundary
annular_disk-1.boundary_ext, 1, 1
annular_disk-1.boundary_ext, 2, 2
annular_disk-1.boundary_ext, 3, 3
annular_disk-1.boundary_ext, 6, 6
annular_disk-1.boundary_int, 3, 3
**
** -----------------------------------------------------------------------------
** STEP 1
** -----------------------------------------------------------------------------
*Step, name=Torsion, nlgeom=YES, inc=1000
*Static
<incini>, <steptime1>, <incmin>, <incmax>
**
** .........................
** CONTROLS
** .........................
*CONTROLS, PARAMETERS=FIELD
<Rn1>, <cn1>
**
*CONTROLS, PARAMETERS=TIME INCREMENTATION
5, 9, , 20, , , , 6, , , , , ,
 0.2, , , , , 0.2, 2, ,
 , , , , , , , ,
1.26
**
** .........................
** BOUNDARY CONDITIONS
** .........................
** Name: BC-2 Type: Displacement/Rotation
*Boundary, amplitude=SMOOTHAPPLY
mpc_control_point, 3, 3, <theta>
**
** .........................
** OUTPUT REQUESTS
** .........................
*Restart, write, frequency=0
**
** FIELD OUTPUT: F-Output-1
*Output, field
*Node Output
CF, COORD, RF, U
*Element Output, directions=YES
EE, LE, NE, S, SENER, ELSE, SVOL, STH
**
** HISTORY OUTPUT: H-Output-1
*Output, history, variable=PRESELECT
**
*End Step
