*Heading
Z-plasty 60 deg, R = 300 mm, l = 50 mm - Alpha_1 = 90 deg - S22 = 50 kPa
** GEOMETRY: Single Z-plasty 60°, Circular boundary R=300 mm, Vertical cut length l=50 mm.
** ELEMENTS: 3-nodes, 2D plane stress, h_max=l, h_min=l/150.
** MATERIAL MODEL: DFD model (INCOMPRESSIBLE formulation), 434 Lebedev integration points.
** MATERIAL PARAMETERS: Parameters from Alberini et al. (2024) (Acta Biomater.) (fiber parameters averaged from 1st fiber family).
** LOADS: Fix outer boundary, internal boundary closure. Prestress s11=0 kPa, s22=50 kPa, s12=0 kPa.
*Preprint, echo=NO, model=NO, history=NO, contact=NO
**
** =============================================================================
** ================================ PARAMETERS =================================
** =============================================================================
*Parameter
** -----------------------------------------------------------------------------
** MATERIAL PARAMETERS FOR THE UMAT SUBROUTINE UMAT_DFD_LEB.FOR
** -----------------------------------------------------------------------------
** ncf         : number of fibers families.
** vg          : volume fraction of matrix, nu_g.
** mu [Pa]     : matrix shear modulus, mu.
** bulk [Pa]   : bulk modulus, K (ignored in incompressible formulation).
** k1 [Pa]     : fiber parameter, k1>=0.
** k2          : fiber parameter, k2>=0.
** vfi         : volume fraction of the i-th family of fibers, nu_f.
** alphai [deg]: in-plane angle of the fibre family mean direction (wrt x dir).
** betai [deg] : out-of-plane angle of the fibre family mean direction (wrt x-y plane).
** gammai [deg]: rolling angle of fibre family about its mean direction.
** conai       : in-plane von Mises concentration parameter [-inf,inf].
** conbi       : out-of-plane von Mises concentration parameter [-inf,inf].
**
matname = "DFD_IN-human_skin"
**
ncf    = 1
**
vg     = 1.00
mu     = 1.142e3
bulk   = mu*1e2
**
k1     = 1.9074e3
k2     = 43.59
**
vf1    = 1.00
alpha1 = 90.0
beta1  = 0.0
gamma1 = 0.0
cona1  = 2.060
conb1  = 12.363
**
** -----------------------------------------------------------------------------
** COMPUTATION PARAMETERS
** -----------------------------------------------------------------------------
** rint: integration points source flag (999=read integration points of i-th
**       fiber family from materialname.int[i] file, ignore concentrations
**       parameters conai, conbi; 0=use built-in Lebedev integration).
** nint: target number of Lebedev integration points on the unit sphere per fiber family (ignored if rint=999).
** thr : threshold integrand value for integration points retention (1e-6 suggested, 0.0 keeps all).
** csw : compressed fiber exclusion switch (1=exclude comp fibers, 0=include all fibers).
** elem: element type (1=continuum, 2=structural).
** ori : type of active orientation (0=global orientation, 1=local orientation).
**
rint = 0
nint = 434
thr  = 1e-6
csw  = 1
**
** IMPORTANT VARIABLES FOR THE CORRECT COMPUTATION OF THE DEFORMATION GRADIENT
elem = 1
ori  = 0
**
** -----------------------------------------------------------------------------
** GEOMETRICAL PARAMETERS
** -----------------------------------------------------------------------------
** t[m]: thickness
t = 2.92e-03
**
** -----------------------------------------------------------------------------
** ELEMENT TYPE
** -----------------------------------------------------------------------------
eltype  = "CPS3"
**
** -----------------------------------------------------------------------------
** STEP PARAMETERS
** -----------------------------------------------------------------------------
** Time parametrs:
incini1   = 1.00
steptime1 = 1.00
incmin1   = 0.00001
incmax1   = 1.00
**
incini2   = 0.001
steptime2 = 1.00
incmin2   = 0.00001
incmax2   = 0.10
**
** Tolerances:
** Rn: tolerance for largest residual in the balance equation (Abaqus default 5E-3).
** cn: tolerance for largest maximum correction to nodal variable (Abaqus default 1E-2).
Rn1 = 5E-3
cn1 = 1E-2
Rn2 = 5E-3
cn2 = 1E-2
**
** -----------------------------------------------------------------------------
** LOADING PARAMETERS
** -----------------------------------------------------------------------------
** Control point displacement.
disp = 1.0
** Prestress field components.
s11 = 0.0
s22 = 50e3
s12 = 0.0
**
** =============================================================================
** =================================== MODEL ===================================
** =============================================================================
** -----------------------------------------------------------------------------
** PARTS
** -----------------------------------------------------------------------------
*Part, name=membrane
*Node
      1,   -0.2995174,    0.0170096,    0.0000000
      2,   -0.2995174,   -0.0170097,    0.0000000
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*Element, type=<eltype>
    1,   20,   40,   31
    2,   31,   17,   20
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*Nset, nset=Set-1, generate
    1, 13270,     1
*Elset, elset=Set-1, generate
    1, 25891,     1
** Section:skin
*Solid Section, elset=Set-1, material=<matname>
<t>,
*End Part
**
*Part, name=control_point
*Node
      1,    0.0000000,    0.0000000,    0.0000000
*Nset, nset=control_point, internal
    1,
*End Part
**
** -----------------------------------------------------------------------------
** ASSEMBLY
** -----------------------------------------------------------------------------
*Assembly, name=Assembly
**
*Instance, name=membrane_instance, part=membrane
*End Instance
**
*Instance, name=control_point_instance, part=control_point
*End Instance
**
*Nset, nset=mpc_control_point, instance=control_point_instance
    1,
*Nset, nset=left_side_1, unsorted, instance=membrane_instance
 6506, 6507, 6508, 6509, 6510, 6511
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*Nset, nset=right_side_1, unsorted, instance=membrane_instance
 6645, 6688, 6828, 6882, 6973, 7060
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*Nset, nset=ext_bound_subset_1, unsorted, instance=membrane_instance
13270,13268,13266,13264,13262,13258
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*Nset, nset=ext_bound_all, unsorted, instance=membrane_instance
13270,13268,13266,13264,13262,13258
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*Nset, nset=ext_boundary_north_pole, instance=membrane_instance
 4378,
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*Nset, nset=all_membrane_nodes, instance=membrane_instance, generate
    1,  13270,      1
*Elset, elset=all_membrane_elements, instance=membrane_instance, generate
    1,  25891,      1
**
** Constraint:sutura
*MPC, user, mode=NODE
99, left_side_1, right_side_1, mpc_control_point
**
*End Assembly
**
** -----------------------------------------------------------------------------
** MATERIALS
** -----------------------------------------------------------------------------
*Material, name=DFD_IN-human_skin
*Depvar
<ncf>
*User Material, constants=20
<bulk>, <vg>, <mu>, <k1>, <k2>, <vf1>, <alpha1>, <beta1>,
<gamma1>, <cona1>, <conb1>, <rint>, <nint>, <thr>, <csw>, <elem>,
<ori>, 0.0, 0.0, 0.0
**
** =============================================================================
** =================================== STEPS ===================================
** =============================================================================
** -----------------------------------------------------------------------------
** INITIAL CONDITIONS
** -----------------------------------------------------------------------------
** .........................
** BOUNDARY CONDITIONS
** .........................
** Name: BC-1 Type: Displacement/Rotation
*Boundary
ext_bound_all, 1, 1
ext_bound_all, 2, 2
all_membrane_nodes, 3, 3
**
** .........................
** PREDEFINED FIELDS
** .........................
** Name: Predefined Field-1 Type: Stress
*Initial Conditions, type=STRESS
all_membrane_elements, <s11>, <s22>, <s12>,
**
** -----------------------------------------------------------------------------
** STEP 1
** -----------------------------------------------------------------------------
*Step, name=StressInitialization, nlgeom=YES, inc=1000
*Static
<incini1>, <steptime1>, <incmin1>, <incmax1>
**
** .........................
** CONTROLS
** .........................
*CONTROLS, PARAMETERS=FIELD
<Rn1>, <cn1>
**
** .........................
** BOUNDARY CONDITIONS
** .........................
** Name: BC-1 Type: Displacement/Rotation
*Boundary
mpc_control_point, 1, 1, 0.0
**
** .........................
** OUTPUT REQUESTS
** .........................
*Restart, write, frequency=0
**
** FIELD OUTPUT: F-Output-1
*Output, field
*Node Output
CF, COORD, RF, U
*Element Output, directions=YES
EE, LE, NE, S, SENER, ELSE, SVOL, STH
**
** HISTORY OUTPUT: H-Output-1
*Output, history, variable=PRESELECT
**
*End Step
**
** -----------------------------------------------------------------------------
** STEP 2
** -----------------------------------------------------------------------------
*Step, name=Closure, nlgeom=YES, inc=1000
*Static
<incini2>, <steptime2>, <incmin2>, <incmax2>
**
** .........................
** CONTROLS
** .........................
*CONTROLS, PARAMETERS=FIELD
<Rn2>, <cn2>
**
** .........................
** BOUNDARY CONDITIONS
** .........................
** Name: BC-2 Type: Displacement/Rotation
*Boundary
mpc_control_point, 1, 1, 1.0
**
** .........................
** OUTPUT REQUESTS
** .........................
*Restart, write, frequency=0
**
** FIELD OUTPUT: F-Output-1
*Output, field
*Node Output
CF, COORD, RF, U
*Element Output, directions=YES
EE, LE, NE, S, SENER, ELSE, SVOL, STH
**
** HISTORY OUTPUT: H-Output-1
*Output, history, variable=PRESELECT
**
*End Step
** =============================================================================
