*Heading
Annular disk torsion with 2 materials - Mixed integration schemes
** GEOMETRY: Annular disk, outer radius D=10 mm, inner radius d=4 mm, (see Ehret et al., 2010).
** ELEMENTS: 4-nodes, 3D membrane elements (structural).
** MATERIAL MODEL: DFD model (INCOMPRESSIBLE formulation), Material A: TrighMesh adaptive interation, Material B: Lebedev.
** MATERIAL A PARAMETERS (outer ring): Parameters from Li et al. (2018) (Mathematics and Mechanics of Solids).
** MATERIAL B PARAMETERS (inner ring): Parameters from Alberini et al. (2024) (Acta Biomater.) (2 fiber families).
** LOADS: Fix outer boundary, left torsion (theta=30°) on the inner boundary.
*Preprint, echo=NO, model=NO, history=NO, contact=NO
**
** =============================================================================
** ================================ PARAMETERS =================================
** =============================================================================
*Parameter
** -----------------------------------------------------------------------------
** MATERIAL PARAMETERS FOR THE UMAT SUBROUTINE UMAT_DFD_LEB.FOR
** -----------------------------------------------------------------------------
** ncf         : number of fibers families.
** vg          : volume fraction of matrix, nu_g.
** mu [Pa]     : matrix shear modulus, mu.
** bulk [Pa]   : bulk modulus, K (ignored in incompressible formulation).
** k1 [Pa]     : fiber parameter, k1>=0.
** k2          : fiber parameter, k2>=0.
** vfi         : volume fraction of the i-th family of fibers, nu_f.
** alphai [deg]: in-plane angle of the fibre family mean direction (wrt x dir).
** betai [deg] : out-of-plane angle of the fibre family mean direction (wrt x-y plane).
** gammai [deg]: rolling angle of fibre family about its mean direction.
** conai       : in-plane von Mises concentration parameter [-inf,inf].
** conbi       : out-of-plane von Mises concentration parameter [-inf,inf].
**
matname_A = "DFD_IN-human_skin-2816"
**
ncf_A    = 2
**
vg_A     = 1.00
mu_A     = 1.142e3
bulk_A   = mu_A*1e2
**
k1_A     = 1.9074e3
k2_A     = 43.59
**
vf1_A    = 0.50
alpha1_A = 0.0
beta1_A  = 0.0
gamma1_A = 0.0
cona1_A  = 2.060
conb1_A  = 12.363
**
vf2_A    = 0.50
alpha2_A = 90.0
beta2_A  = 0.0
gamma2_A = 0.0
cona2_A  = 2.060
conb2_A  = 12.363
**
matname_B = "DFD_IN-isotropic_soft_tissue"
**
ncf_B    = 1
**
vg_B     = 1.00
mu_B     = 1.64e3
bulk_B   = mu_B*1e2
**
k1_B     = 5.63e3
k2_B     = 14.25
**
vf1_B    = 1.0
alpha1_B = 0.0
beta1_B  = 0.0
gamma1_B = 0.0
cona1_B  = 0.00
conb1_B  = 0.00
**
** -----------------------------------------------------------------------------
** COMPUTATION PARAMETERS
** -----------------------------------------------------------------------------
** rint: integration points source flag (999=read integration points of i-th
**       fiber family from materialname.int[i] file, ignore concentrations
**       parameters conai, conbi; 0=use built-in Lebedev integration).
** nint: target number of Lebedev integration points on the unit sphere per fiber family (ignored if rint=999).
** thr : threshold integrand value for integration points retention (1e-6 suggested, 0.0 keeps all).
** csw : compressed fiber exclusion switch (1=exclude comp fibers, 0=include all fibers).
** elem: element type (1=continuum, 2=structural).
** ori : type of active orientation (0=global orientation, 1=local orientation).
**
rint_A = 999
nint_A = 0
rint_B = 0
nint_B = 590
thr  = 1e-6
csw  = 1
**
** IMPORTANT VARIABLES FOR THE CORRECT COMPUTATION OF THE DEFORMATION GRADIENT
elem = 2
ori  = 0
**
** -----------------------------------------------------------------------------
** GEOMETRICAL PARAMETERS
** -----------------------------------------------------------------------------
** t[m]: thickness
t = 2.92e-03
**
** -----------------------------------------------------------------------------
** ELEMENT TYPE
** -----------------------------------------------------------------------------
eltype  = "M3D4"
**
** -----------------------------------------------------------------------------
** STEP PARAMETERS
** -----------------------------------------------------------------------------
** Time parametrs:
incini    = 0.001
steptime1 = 1.00
incmin    = 0.00001
incmax    = 0.05
**
** Tolerances:
** Rn: tolerance for largest residual in the balance equation (Abaqus default 5E-3).
** cn: tolerance for largest maximum correction to nodal variable (Abaqus default 1E-2).
Rn1 = 5E-3
cn1 = 1E-2
**
** -----------------------------------------------------------------------------
** LOADING PARAMETERS
** -----------------------------------------------------------------------------
** Control point displacement/rotation.
Pi  = 3.141592654
theta = 30*Pi/180
**
** =============================================================================
** =================================== MODEL ===================================
** =============================================================================
** -----------------------------------------------------------------------------
** PARTS
** -----------------------------------------------------------------------------
*Part, name=annular_disk
*Node
      1,           0., -0.00700000022,           0.
      2, 0.00700000022,           0.,           0.
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*Element, type=<eltype>
  1,   1,  13, 433,  88
  2,  13,  14, 434, 433
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*Nset, nset=boundary_ext
   6,   7,  10,  12, 127, 128
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*Elset, elset=boundary_ext
  571,  572,  573,  574,  575,  576
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*Nset, nset=boundary_int
   3,   4,   9,  11,  51,  52
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*Elset, elset=boundary_int
  271,  272,  273,  274,  275,  276
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*Nset, nset=boundary_mid
   1,   2,   5,   8,  13,  14
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*Elset, elset=boundary_mid
    1,    2,    3,    4,    5,    6
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*Nset, nset=surf_int
    1,    2,    3,    4,    5,    8
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*Elset, elset=surf_int
    1,    2,    3,    4,    5,    6
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*Nset, nset=surf_ext
    1,    2,    5,    6,    7,    8
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*Elset, elset=surf_ext
  301,  302,  303,  304,  305,  306
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*Nset, nset=radii
   1,   2,   3,   4,   5,   6
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*Elset, elset=radii
    1,   30,   31,   60,   61,   90
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*Nset, nset=all_nodes, generate
    1, 2520,     1
*Elset, elset=all_elements, generate
    1, 2400,     1
**
** Section:skin
*Membrane Section, elset=surf_ext, material=<matname_B>
<t>,
*Membrane Section, elset=surf_int, material=<matname_A>
<t>,
*End Part
**
*Part, name=control_point
*Node
      1,    0.0000000,    0.0000000,    0.0000000
*Nset, nset=control_point, internal
    1,
*End Part
**
** -----------------------------------------------------------------------------
** ASSEMBLY
** -----------------------------------------------------------------------------
*Assembly, name=Assembly
**
*Instance, name=annular_disk-1, part=annular_disk
*End Instance
**
*Instance, name=control_point_instance, part=control_point
*End Instance
**
*Nset, nset=mpc_control_point, instance=control_point_instance
    1,
**
** Constraint: axial_rotation
*MPC, user, mode=NODE
123, annular_disk-1.boundary_int, mpc_control_point
**
*End Assembly
**
** -----------------------------------------------------------------------------
** AMPLITUDE
** -----------------------------------------------------------------------------
*Amplitude, name=SMOOTHAPPLY, definition=SMOOTH STEP
0., 0., 1., 1.
**
** -----------------------------------------------------------------------------
** MATERIALS
** -----------------------------------------------------------------------------
*Material, name=DFD_IN-human_skin-2816
*Depvar
<ncf_A>
*user material, type=mechanical, constants=26
<bulk_A>, <vg_A>, <mu_A>, <k1_A>, <k2_A>, <vf1_A>, <alpha1_A>, <beta1_A>,
<gamma1_A>, <cona1_A>, <conb1_A>, <vf2_A>, <alpha2_A>, <beta2_A>, <gamma2_A>, <cona2_A>,
<conb2_A>, <rint_A>, <nint_A>, <thr>, <csw>, <elem>, <ori>, 0.0,
 0.0, 0.0
**
*Material, name=DFD_IN-isotropic_soft_tissue
*Depvar
<ncf_B>
*user material, type=mechanical, constants=20
<bulk_B>, <vg_B>, <mu_B>, <k1_B>, <k2_B>, <vf1_B>, <alpha1_B>, <beta1_B>,
<gamma1_B>, <cona1_B>, <conb1_B>, <rint_B>, <nint_B>, <thr>, <csw>, <elem>,
<ori>, 0.0, 0.0, 0.0
**
** =============================================================================
** =================================== STEPS ===================================
** =============================================================================
** -----------------------------------------------------------------------------
** INITIAL CONDITIONS
** -----------------------------------------------------------------------------
** .........................
** BOUNDARY CONDITIONS
** .........................
** Name: BC-ext Type: Displacement/Rotation
*Boundary
annular_disk-1.boundary_ext, 1, 1
annular_disk-1.boundary_ext, 2, 2
annular_disk-1.boundary_ext, 3, 3
annular_disk-1.boundary_ext, 6, 6
annular_disk-1.boundary_int, 3, 3
**
** -----------------------------------------------------------------------------
** STEP 1
** -----------------------------------------------------------------------------
*Step, name=Torsion, nlgeom=YES, inc=1000
*Static
<incini>, <steptime1>, <incmin>, <incmax>
**
** .........................
** CONTROLS
** .........................
*CONTROLS, PARAMETERS=FIELD
<Rn1>, <cn1>
**
*CONTROLS, PARAMETERS=TIME INCREMENTATION
5, 9, , 20, , , , 6, , , , , ,
 0.2, , , , , 0.2, 2, ,
 , , , , , , , ,
1.26
**
** .........................
** BOUNDARY CONDITIONS
** .........................
** Name: BC-2 Type: Displacement/Rotation
*Boundary, amplitude=SMOOTHAPPLY
mpc_control_point, 3, 3, <theta>
**
** .........................
** OUTPUT REQUESTS
** .........................
*Restart, write, frequency=0
**
** FIELD OUTPUT: F-Output-1
*Output, field
*Node Output
CF, COORD, RF, U
*Element Output, directions=YES
EE, LE, NE, S, SENER, ELSE, SVOL, STH
**
** HISTORY OUTPUT: H-Output-1
*Output, history, variable=PRESELECT
**
*End Step
